# Natural gas combustion; internal combustion engines, commercial/institutional, natural gas, turbine:cogeneration,pre-combustion chamber; at turbine

Dataset: openLCA process, unit process
Category: Equipment
Geography: United States of America (the)
Time period: 2012-01-01 to 2022-12-31
Allocation method: physical allocation
Data quality: US EPA - Process Pedigree Matrix (3;1)
Exchange data quality scheme: US EPA - Flow Pedigree Matrix
Generated by: ERG
Owner: National Energy Technology Laboratory
Published in: NETL (2014) Combustion of Natural Gas
isCopyrightProtected: false
restrictionsDescription: These U.S. LCI Database Project data (""Data"") are provided by the National Renewable Energy Laboratory (""NREL""), operated by the Alliance for Sustainable Energy, LLC (""Alliance"") for the US Department of Energy (""DOE"") under Contract No. DE-AC36-08GO28308. The United States Government (the ""Government"") retains and the user acknowledges that the Government retains a non-exclusive, paid-up, irrevocable, worldwide license to publish or reproduce the published form of these data, or allow others to do so, for Government purposes. Access to and use of these Data shall impose the following obligations on the user, as set forth in this Agreement. The user is granted the right, without any fee or cost, to use, copy, modify, alter, enhance and distribute these Data for any purpose whatsoever, provided that this entire notice appears in all copies of the Data. Any modification, alteration or enhancement of these data shall be identified and documented by the user. Further, the user agrees to credit the DOE/NREL/Alliance in any publication that results from the use of these Data. The names DOE/NREL/Alliance, however, may not be used in any advertising or publicity to endorse or promote any products or commercial entities unless specific written permission is obtained from DOE/NREL/Alliance. The user also understands that DOE/NREL/Alliance is not obligated to provide the user with any support, consulting, training or assistance of any kind with regard to the use of these Data or to provide the user with any updates, revisions or new versions of these Data. YOU AGREE TO INDEMNIFY THE GOVERNMENT AND DOE/NREL/ALLIANCE, AND ITS SUBSIDIARIES, AFFILIATES, OFFICERS, AGENTS, AND EMPLOYEES AGAINST ANY CLAIM OR DEMAND, INCLUDING REASONABLE ATTORNEYS' FEES, RELATED TO YOUR USE OF THESE DATA. THESE DATA ARE PROVIDED BY DOE/NREL/ALLIANCE ""AS IS"" AND ANY EXPRESS OR IMPLIED WARRANTIES, INCLUDING BUT NOT LIMITED TO, THE IMPLIED WARRANTIES OF MERCHANTABILITY AND FITNESS FOR A PARTICULAR PURPOSE ARE DISCLAIMED. IN NO EVENT SHALL THE GOVERNMENT OR DOE/NREL/ALLIANCE BE LIABLE FOR ANY SPECIAL, INDIRECT OR CONSEQUENTIAL DAMAGES OR ANY DAMAGES WHATSOEVER, INCLUDING BUT NOT LIMITED TO CLAIMS ASSOCIATED WITH THE LOSS OF DATA OR PROFITS, WHICH MAY RESULT FROM AN ACTION IN CONTRACT, NEGLIGENCE OR OTHER TORTIOUS CLAIM THAT ARISES OUT OF OR IN CONNECTION WITH THE ACCESS, USE OR PERFORMANCE OF THESE DATA.

## General comment
This unit process represents the combustion of natural gas fuel in the specified equipment. The data was developed from National Energy and Technology Laboratory (NETL) datasets, which incorporate Webfire circa 2014 as the primry source of emissions factors. For emissions control technologies-- SCR refers to selective catalytic reduction, SNCR refers to selective non-catalytic reduction. Boilers that are labeled "post-NSPS" are referring to the U.S. EPA New Source Performance Standards.

## Technology
Data represents combustion of natural gas fuel in the specified equipment. Commercial/institutional refers to equipment used in commercial establishments or institutional establishments such as medical centers, nursing homes, research centers, institutions of higher education, elementary and secondary schools, libraries, religious establishments, governmental buildings, hotels, restaurants, and laundries to provide electricity, steam, and/or hot water.

## Geography
United States

## Time period
Data best represents 2012. Validity date range is based on an assumption of a 10 year equipment life span.

## Reference product
- Natural gas combustion; internal combustion engines, commercial/institutional, natural gas, turbine:cogeneration,pre-combustion chamber: 1 kg

## Inputs from technosphere
- Natural gas; production mixture; to energy use: 1 kg; data quality (3,5,2,1,3); provider Natural gas; processed for energy use; at plant

## Emissions to nature
All rows: data quality (3,5,2,1,3)
- Acenaphthene [emission, air]: 4.23935e-11 kg
  Acenaphthene [unspecified]
- Acenaphthylene [emission, air]: 4.23935e-11 kg
- Acetaldehyde [emission, air]: 9.6563e-7 kg
- Acrolein [emission, air]: 1.54501e-7 kg
  Acrolein [Group NMVOC to air]
- Anthracene [emission, air]: 5.65247e-11 kg
  Anthracene [Group PAH to air]
- Arsenic(V) [emission, air]: 4.71039e-9 kg
  Arsenic (+V) [Heavy metals to air]
- Barium [emission, air]: 1.03629e-7 kg
  Barium [Inorganic emissions to air]
- Benzene [emission, air]: 2.89689e-7 kg
  Benzene [Group NMVOC to air]
- Benz[a]anthracene [emission, air]: 4.23935e-11 kg
  Benzo (a) anthracene
- Benzo[a]pyrene [emission, air]: 2.82623e-11 kg
  Benzo (a) pyrene
- Benzo(b)fluoranthene [emission, air]: 4.23935e-11 kg
  Benzo (b) fluoranthene
- Benzo[ghi]perylene [emission, air]: 2.82623e-11 kg
  Benzo (g,h,i) perylene
- Benzo[k]fluoranthene [emission, air]: 4.23935e-11 kg
  Benzo (k) fluoranthene
- Beryllium [emission, air]: 2.82623e-10 kg
  Beryllium [Inorganic emissions to air]
- 1,3-Butadiene [emission, air]: 1.03805e-8 kg
- Butane [emission, air]: 4.94591e-5 kg
  n-Butane
- Cadmium [emission, air]: 2.59071e-8 kg
  Cadmium [Heavy metals to air]
- Carbon dioxide [emission, air]: 2.65548 kg
- Carbon monoxide [emission, air]: 0.000362111 kg
- Chloroform [emission, air]: 0 kg
  Trichloromethane (chloroform) [Halogenated organic emissions to air]
- Chromium [emission, air]: 3.29727e-8 kg
  Chromium (unspecified) [Heavy metals to air]
- Chrysene [emission, air]: 4.23935e-11 kg
  Chrysene [Group PAH to air]
- Cobalt [emission, air]: 1.97836e-9 kg
  Cobalt [Heavy metals to air]
- Copper [emission, air]: 2.00192e-8 kg
  Copper [Inorganic emissions to air]
- Dibenz[a,h]anthracene [emission, air]: 2.82623e-11 kg
  Dibenzo(a,h) anthracene
- Dichlorobenzene [emission, air]: 2.82623e-8 kg
  Dichlorobenzene, mixed isomers
- Methylene chloride [emission, air]: 0 kg
  Dichloromethane (methylene chloride) [Halogenated organic emissions to air]
- 7,12-Dimethylbenz[a]anthracene [emission, air]: 3.76831e-10 kg
  Dimethylbenz(a)anthracene
- Ethane [emission, air]: 7.3011e-5 kg
  Ethane [Group NMVOC to air]
- Ethylbenzene [emission, air]: 7.72504e-7 kg
- Fluoranthene [emission, air]: 7.06558e-11 kg
- Fluorene [emission, air]: 6.59455e-11 kg
- Formaldehyde [emission, air]: 1.71399e-5 kg
- Indeno[1,2,3-cd]pyrene [emission, air]: 4.23935e-11 kg
  Indeno(1,2,3-cd)pyrene
- Xylene [emission, air]: 1.54501e-6 kg
  Isomers of xylene
- Lead [emission, air]: 1.1776e-8 kg
  Lead [Heavy metals to air]
- Manganese [emission, air]: 8.94974e-9 kg
  Manganese [Heavy metals to air]
- Mercury [emission, air]: 6.12351e-9 kg
  Mercury [Heavy metals to air]
- Methane [emission, air]: 0.00020761 kg
- 2-Methylnaphthalene [emission, air]: 5.65247e-10 kg
  2-Methyl Naphthalene
- 3-Methylcholanthrene [emission, air]: 4.23935e-11 kg
- Molybdenum [emission, air]: 2.59071e-8 kg
  Molybdenum [Heavy metals to air]
- Hexane [emission, air]: 4.23935e-5 kg
  N-Hexane
- Pentane [emission, air]: 6.12351e-5 kg
  N-Pentane
- Naphthalene [emission, air]: 3.1383e-8 kg
- Nickel(II) [emission, air]: 4.94591e-8 kg
  Nickel (+II) [Heavy metals to air]
- Nitrogen oxides [emission, air]: 0.00238993 kg
  Nitrogen oxides (NOx)
- Nitrous oxide [emission, air]: 7.24222e-5 kg
- Phenanthrene [emission, air]: 4.00383e-10 kg
- Particulate matter, > 10μm [emission, air]: 4.47488e-5 kg
  >PM10
- PAH/POM, unspecified [emission, air]: 5.31096e-8 kg
  Polycyclic aromatic hydrocarbons (PAH)
- Propylene oxide [emission, air]: 7.00082e-7 kg
- Propane [emission, air]: 3.76831e-5 kg
  Propane [Group NMVOC to air]
- Pyrene [emission, air]: 1.1776e-10 kg
  Pyrene [Group PAH to air]
- Selenium [emission, air]: 5.65247e-10 kg
  Selenium [Heavy metals to air]
- Sulfur dioxide [emission, air]: 1.41312e-5 kg
- Toluene [emission, air]: 3.1383e-6 kg
  Toluene (methyl benzene) [Group NMVOC to air]
- Volatile organic compounds [emission, air]: 0.000265548 kg
  Total organic compounds (TOC)
- Vanadium(III) [emission, air]: 5.41695e-8 kg
  Vanadium (+III) [Heavy metals to air]
- Volatile organic compounds [emission, air]: 5.06956e-5 kg
  Volatile organic compounds (VOC)
- Zinc [emission, air]: 6.83006e-7 kg
  Zinc [Inorganic emissions to air]
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
## Inventory method
Attributional

## Completeness
Relevant emissions to air captured, other flows such as ash or waste products from emissions control technologies are not included.

## Data selection
NETL calculates combustion emissions based on the data reported in the EPA WebFIRE database. WebFIRE is the EPA's online database that contains emissions factors for criteria and hazardous air pollutants (HAP) for industrial and non-industrial processes and multiple reports submitted to the EPA using the Compliance and Emissions Data Reporting Interface (CEDRI) in response to regulatory requirements under Parts 60 and 63 of Title 40 of the U.S. Code of Federal Regulations (CFR).

## Data treatment
NETL calculates combustion emissions based on the data reported in the EPA WebFIRE database. The database was filtered down to the intended fuel and equipment type, and emissions were normalized to the basis of 1 kg fuel combusted. Note, errors in the source dataset (e.g. unit conversion, typos, flow overlap) were identified and corrected.

## Data collection
Emissions data were collected from the EPA WebFIRE database.

## Sampling procedure
For information on how data were collected, see Publication.

## Intended application
Situation C1 - Accounting, with system-external interactions - The intended application is a purely descriptive accounting / documentation of the analyzed system including existing interactions with other systems in the LCI model. Relevant emissions to air captured, other flows such as ash or waste products from emissions control technologies are not included. The target audience of this model includes LCA practitioners, industry, and the general public.

## Project
This dataset was developed by the Federal LCA Commons Data Curator Eastern Research Group, Inc. (ERG) under subcontract (SUB-2024-10066) to the National Renewable Energy Laboratory under Department of Energy (DOE) Prime Contract No. DE-AC36-08GO28308. The work is funded by DOE's Advanced Materials & Manufacturing Technologies Office (AMMTO).

## Review Dependent internal review
ERG internally reviewed the programs, underlying assumptions, and mathematical operations required to produce the JSON-LD files for addition to USLCI.

## Sources
- NETL (2014) Combustion of Natural Gas
- ERG (2026) NETL Stationary Combustion
- U.S. EPA (1999) Compilation of Air Pollutant Emission Factors
- U.S. EPA (2012) WebFIRE
- Battye, R. et al. (1994) Development and Selection of Ammonia Emission Factors Final Report
- U.S. EPA (2011) Emission factors for greenhouse gas inventories
