# Drinking water treatment; primary disinfection; gaseous chlorine; at plant

Dataset: openLCA process, unit process
Category: 22: Utilities/2213: Water, Sewage and Other Systems
Geography: United States of America (the)
Time period: 2011-01-01 to 2011-12-31
Data quality: US EPA - Process Pedigree Matrix (2;1)
Generated by: ERG
Owner: U.S. EPA
Published in: U.S. EPA 2014
isCopyrightProtected: false
restrictionsDescription: "These U.S. LCI Database Project data (""Data"") are provided by the National Renewable Energy Laboratory (""NREL""), operated by the Alliance for Sustainable Energy, LLC (""Alliance"") for the US Department of Energy (""DOE"") under Contract No. DE-AC36-08GO28308. The United States Government (the ""Government"") retains and the user acknowledges that the Government retains a non-exclusive, paid-up, irrevocable, worldwide license to publish or reproduce the published form of these data, or allow others to do so, for Government purposes.
Access to and use of these Data shall impose the following obligations on the user, as set forth in this Agreement. The user is granted the right, without any fee or cost, to use, copy, modify, alter, enhance and distribute these Data for any purpose whatsoever, provided that this entire notice appears in all copies of the Data. Any modification, alteration or enhancement of these data shall be identified and documented by the user. Further, the user agrees to credit the DOE/NREL/Alliance in any publication that results from the use of these Data. The names DOE/NREL/Alliance, however, may not be used in any advertising or publicity to endorse or promote any products or commercial entities unless specific written permission is obtained from DOE/NREL/Alliance. The user also understands that DOE/NREL/Alliance is not obligated to provide the user with any support, consulting, training or assistance of any kind with regard to the use of these Data or to provide the user with any updates, revisions or new versions of these Data.
YOU AGREE TO INDEMNIFY THE GOVERNMENT AND DOE/NREL/ALLIANCE, AND ITS SUBSIDIARIES, AFFILIATES, OFFICERS, AGENTS, AND EMPLOYEES AGAINST ANY CLAIM OR DEMAND, INCLUDING REASONABLE ATTORNEYS' FEES, RELATED TO YOUR USE OF THESE DATA. THESE DATA ARE PROVIDED BY DOE/NREL/ALLIANCE ""AS IS"" AND ANY EXPRESS OR IMPLIED WARRANTIES, INCLUDING BUT NOT LIMITED TO, THE IMPLIED WARRANTIES OF MERCHANTABILITY AND FITNESS FOR A PARTICULAR PURPOSE ARE DISCLAIMED. IN NO EVENT SHALL THE GOVERNMENT OR DOE/NREL/ALLIANCE BE LIABLE FOR ANY SPECIAL, INDIRECT OR CONSEQUENTIAL DAMAGES OR ANY DAMAGES WHATSOEVER, INCLUDING BUT NOT LIMITED TO CLAIMS ASSOCIATED WITH THE LOSS OF DATA OR PROFITS, WHICH MAY RESULT FROM AN ACTION IN CONTRACT, NEGLIGENCE OR OTHER TORTIOUS CLAIM THAT ARISES OUT OF OR IN CONNECTION WITH THE ACCESS, USE OR PERFORMANCE OF THESE DATA."

## General comment
This process reflects operation of the Primary Disinfection, Gaseous Chlorine drinking water treatment process normalized to the functional unit of 1000 cubic feet of treated drinking water. When part of the linked drinking water treatment system, this process "meets or exceeds [U.S.] National Primary Drinking Water Regulations for microorganisms, disinfectants, disinfectant by-products, inorganics, organics, and radionuclides."

To model the full scope of impacts associated with drinking water treatment - which includes acquisition, treatment, distribution and infrastructure - use one of the four drinking water processes:
• Drinking water; Chlorine disinfection; at consumer; ft3 drinking water
• Drinking water; Chlorine disinfection, no adsorption; at consumer; ft3 drinking water
• Drinking water; UV disinfection; at consumer; ft3 drinking water
• Drinking water; UV disinfection, no adsorption; at consumer; ft3 drinking water

Inventory data was collected from the Greater Cincinnati Water Works (GCWW) Richard Miller Treatment Plant, which serves a population of 241,000 customers and treats approximately 106 million gallons per day.

## Technology
Water is dosed with chlorine

## Geography
The case-study facility is located in Cincinnati Ohio and this process reflects the topography and scale of that facility. Background datasets have been selected to represent U.S. average conditions.

## Time period
Data collected 2011. Drinking water treatment standards will change over time and with geography. Updating background electricity and input data should maintain process relevance so long as the target treatment system matches the defined system.

## Parameters
- maxchlorine: 0; = If(selectchlorine=3;.16;0)
  Switch for maximum input quantity chlorine
- averagechlorine: 0.11; = If(selectchlorine=1;.11;0)
  Switch for average input quantity chlorine
- selectchlorine: 1
  If =1, average quantity chlorine; If = 2, min; If = 3, max
- minchlorine: 0; = If(selectchlorine=2;.08;0)
  Switch for minimum input quantity chlorine
- chlorineinput: 0.11; = averagechlorine+minchlorine+maxchlorine
  chlorine input value

## Reference product
- Drinking water treatment; primary disinfection; gaseous chlorine: 1000 cu ft

## Inputs from technosphere
- Chlorine; chlor-alkali electrolysis; at plant: 0.11 lb av; = (chlorineinput)
- Drinking water treatment; primary chlorine disinfection infrastructure: 1000 cu ft; = 1000; provider Drinking water treatment; primary chlorine disinfection infrastructure; at plant
- Transport; combination truck; diesel powered: 0.0020485 t*mi; = ((0.00136 + 0.002737) / 2); uniform minimum 0, maximum 0
- Transport, rail, freight; diesel powered: 0.0191987 t*km; = 1.609344 * (((0.00792 + 0.015939) / 2)); uniform minimum 0, maximum 0; provider Transport, train; diesel powered

## Inventory method
Attributional

## Modelling constants
Inventory exchange values were sourced directly from the cited EPA report on disinfection options in municipal drinking water treatment. Background data sources have, in some cases, been updated to reflect newer and/or public data sources. Elementary flows were mapped to the federal elementary flow list.

## Completeness
This process aggregates operational impacts. Infrastructure is included via upstream processes. No significant missing flows are known. The mass balance for this process was not calculated.

## Data selection
Primary data was provided by representatives of the Greater Cincinnati Water Works Richard Miller Treatment Plant.

## Data treatment
Operational inventory values were provided by the case-study facility, in Cincinnati Ohio, per 1000 cubic feet of water treated.

## Data collection
2011

## Sampling procedure
This drinking water unit process is part of a larger product system that models the full scope of flows necessary to estimate environmental impacts of drinking water delivered to the consumer. The scope of the model includes water acquisition, treatment, distribution and infrastructure processes. End-of-life disposal of infrastructure materials is excluded from the model scope. Primary data was provided by representatives of the Greater Cincinnati Water Works Richard Miller Treatment Plant. Uncertainty ranges are not available for this data.

## Use advice
This drinking water unit process is part of a larger product system intended to model the full scope of impacts associated with drinking water treatment - which includes acquisition, treatment, distribution and infrastructure. To model the full scope use one of the four drinking water processes:
• Drinking water; Chlorine disinfection; at consumer; ft3 drinking water
• Drinking water; Chlorine disinfection, no adsorption; at consumer; ft3 drinking water
• Drinking water; UV disinfection; at consumer; ft3 drinking water
• Drinking water; UV disinfection, no adsorption; at consumer; ft3 drinking water
These processes reflect the context of the case study community. Consider adapting background processes to your context if water treatment is a signficant source of impact within the scope of your assessment. Such adaptations could include substituting in an appropriate regional electricity grid or modifying the included treatment processes.

## Intended application
This drinking water unit process is part of a larger product system intended for use as background data by LCA practitioners, industry and the general public. To model the full scope of impacts associated with drinking water treatment - which includes acquisition, treatment, distribution and infrastructure - use one of the four drinking water processes:
• Drinking water; Chlorine disinfection; at consumer; ft3 drinking water
• Drinking water; Chlorine disinfection, no adsorption; at consumer; ft3 drinking water
• Drinking water; UV disinfection; at consumer; ft3 drinking water
• Drinking water; UV disinfection, no adsorption; at consumer; ft3 drinking water

Data is sufficient to produce accurate LCIA results for all TRACI impact categories, energy demand, fossil depletion, and water use.

Situation C2 - Accounting, without system-external interatctions. The intended application is a purely descriptive accounting / documentation of the analysed system excluding existing interactions with other systems in the LCI model.

## Project
Data were prepared by Eastern Research Group (ERG) on behalf of the U.S. EPA under Contract No. EP-C-12-021, "Environmental and Cost Life Cycle Assessment of Disinfection Options for Municipal Drinking Water Treatment"

## Review Independent internal review
Proof reading details: Passed
Other details: none

## Sources
- U.S. EPA 2014
- Xue et al (2019) LCA of Urban Water Systems
